# TPS54202DDCR
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V_start := 22 V
V_stop := 15 V
I_p := 0.7 μA
I_h := 1.55 μA
V_ENfalling := 1.19 V
V_ENrising := 1.22 V
R_sum := (V_start*(V_ENfalling/V_ENrising) - V_stop)/(I_p*(1 - V_ENfalling/V_ENrising) + I_h) = 4121.34 kΩ
R_5 := R_sum*V_ENfalling/(V_stop - V_ENfalling + R_sum*(I_p + I_h)) = 212.468 kΩ
R_sum == R_1 + R_8
I_sum := V_start/(R_sum + R_5) = 5.07637 μA
R_1 := (V_start - 3 V)/I_sum = 3.74283 MΩ
R_8 := R_sum - R_1 = 378.506 kΩ
R_5 == (V_start*(V_ENfalling/V_ENrising) - V_stop)/(I_p*(1 - V_ENfalling/V_ENrising) + I_h)*V_ENfalling/(V_stop - V_ENfalling + (V_start*(V_ENfalling/V_ENrising) - V_stop)/(I_p*(1 - V_ENfalling/V_ENrising) + I_h)*(I_p + I_h))
